// SBML level 2 version 3

model New_Model()

  // Compartments:
  compartment compartment = 1;

  // Species:
  species A1 in compartment = 0.25;
  species L in compartment = 0.25;
  species A4 in compartment = 0; A4 is "A4_";
  species A5 in compartment = 0; A5 is "A5_";
  species A6 in compartment = 0; A6 is "A6_";
  species A7 in compartment = 0; A7 is "A7_";
  species A8 in compartment = 0; A8 is "A8_";
  species A9 in compartment = 0; A9 is "A9_";
  species A10 in compartment = 0; A10 is "A10_";
  species A11 in compartment = 0; A11 is "A11_";
  species A12 in compartment = 0; A12 is "A12_";
  species F1 in compartment = 0; F1 is "F1_";
  species F2 in compartment = 0; F2 is "F2_";
  species F3 in compartment = 0; F3 is "F3_";
  species F4 in compartment = 0; F4 is "F4_";
  species FF in compartment = 0;
  species $Foff in compartment;

  // Parameters:
  kcon = 100000;
  knu = 0.1;
  knu_0 = 0.001;
  kfb = 1000;
  kel = 1000;
  kel_0 = 0.1;
  kfag = 1000;
  k = 1000000;

  // Assignment rules:
  Foff := F1*k;

  // Reactions:
  Rcon: 4 A1 + L => A4; compartment*kcon*A1^4*L;
  Rnu5: A4 + A1 -> A5; compartment*(knu*A4*A1 - knu_0*A5);
  Rnu6: A5 + A1 -> A6; compartment*(knu*A5*A1 - knu_0*A6);
  Rnu7: A6 + A1 -> A7; compartment*(knu*A6*A1 - knu_0*A7);
  Rnu8: A7 + A1 -> A8; compartment*(knu*A7*A1 - knu_0*A8);
  Rnu9: A8 + A1 -> A9; compartment*(knu*A8*A1 - knu_0*A9);
  Rnu10: A9 + A1 -> A10; compartment*(knu*A9*A1 - knu_0*A10);
  Rnu11: A10 + A1 -> A11; compartment*(knu*A10*A1 - knu_0*A11);
  Rnu12: A11 + A1 -> A12; compartment*(knu*A11*A1 - knu_0*A12);
  Rel4: A4 + A12 => F1; compartment*kfb*A4*A12;
  Rel5: A5 + A12 => F1; compartment*kfb*A5*A12;
  Rel7: A7 + A12 => F1; compartment*kfb*A7*A12;
  Rel8: A8 + A12 => F1; compartment*kfb*A8*A12;
  Rel9: A9 + A12 => F1; compartment*kfb*A9*A12;
  Rel10: A10 + A12 => F1; compartment*kfb*A10*A12;
  Rel11: A11 + A12 => F1; compartment*kfb*A11*A12;
  RF1: 2 F1 -> F2; compartment*(kel*F1^2 - kel_0*F2);
  RF2: F2 + F1 -> F3; compartment*(kel*F2*F1 - kel_0*F3);
  RF3: F3 + F1 -> F4; compartment*(kel*F3*F1 - kel_0*F4);
  Rel6: A6 + A12 => F1; compartment*kfb*A6*A12;
  Rfag: F4 => 4 FF; compartment*kfag*F4;

  // Unit definitions:
  unit volume = 1e-3 litre;
  unit time = 3600 second;
end
