// SBML level 3 version 1

model New_Model()
  // model units - substance: substance, time: time, volume: volume, area: area, length: length, extent: substance

  // Compartments:
  compartment compartment = 1 volume;

  // Species:
  species A1 in compartment = 0.25;
  species A2 in compartment = 0;
  species A3 in compartment = 0;
  species A4 in compartment = 0;
  species A5 in compartment = 0;
  species A6 in compartment = 0;
  species A7 in compartment = 0;
  species A8 in compartment = 0;
  species A9 in compartment = 0;
  species A10 in compartment = 0;
  species A11 in compartment = 0;
  species F in compartment = 0;
  species L in compartment = 0;
  species A4_0 in compartment = 0;
  species A5_0 in compartment = 0;
  species A6_0 in compartment = 0;
  species A7_0 in compartment = 0;
  species A8_0 in compartment = 0;
  species A9_0 in compartment = 0;
  species A11_0 in compartment = 0;
  species A12 in compartment = 0; A12 is "A12_";
  species F1 in compartment = 0; F1 is "F1_";
  species A10_0 in compartment = 0;
  species $Fon in compartment;
  species $Foff in compartment;

  // Parameters:
  Knuon = 0.1; Knuon is "knuon";
  knuon = 0.01; knuon is "knuon_";
  kfbon = 1000;
  kcon = 1000;
  kswi = 1;
  knuoff = 0.5;
  knuoff_0 = 0.5;
  kfboff = 1000;
  k = 1000000; k is "k_off";
  k_on = 0;

  // Assignment rules:
  Fon := F*k_on;
  Foff := F1*k;

  // Reactions:
  Rnu1: 2 A1 -> A2; compartment*(Knuon*A1^2 - knuon*A2);
  Rnu2: A2 + A1 -> A3; compartment*(Knuon*A2*A1 - knuon*A3);
  Rnu3: A3 + A1 -> A4; compartment*(Knuon*A3*A1 - knuon*A4);
  Rnu4: A4 + A1 -> A5; compartment*(Knuon*A4*A1 - knuon*A5);
  Rnu5: A5 + A1 -> A6; compartment*(Knuon*A5*A1 - knuon*A6);
  Rnu6: A6 + A1 -> A7; compartment*(Knuon*A6*A1 - knuon*A7);
  Rnu7: A7 + A1 -> A8; compartment*(Knuon*A7*A1 - knuon*A8);
  Rnu8: A8 + A1 -> A9; compartment*(Knuon*A8*A1 - knuon*A9);
  Rnu9: A9 + A1 -> A10; compartment*(Knuon*A9*A1 - knuon*A10);
  Rnu10: A10 + A1 -> A11; compartment*(Knuon*A10*A1 - knuon*A11);
  Rnu11: A11 + A1 => F; compartment*Knuon*A11*A1;
  Rfb1: A1 + F => F; compartment*kfbon*A1*F;
  Rfb2: A2 + F => F; compartment*kfbon*A2*F;
  Rfb3: A3 + F => F; compartment*kfbon*A3*F;
  Rfb4: A4 + F => F; compartment*kfbon*A4*F;
  Rfb5: A5 + F => F; compartment*kfbon*A5*F;
  Rfb6: A6 + F => F; compartment*kfbon*A6*F;
  Rfb7: A7 + F => F; compartment*kfbon*A7*F;
  Rfb8: A8 + F => F; compartment*kfbon*A8*F;
  Rfb9: A9 + F => F; compartment*kfbon*A9*F;
  Rfb10: A10 + F => F; compartment*kfbon*A10*F;
  Rfb11: A11 + F => F; compartment*kfbon*A11*F;
  Rcon: 4 A1 + L => A4_0; compartment*kcon*A1^4*L;
  Rnu4_0: A4_0 + A1 -> A5_0; compartment*(knuoff*A4_0*A1 - knuoff_0*A5_0);
  Rnu5_0: A5_0 + A1 -> A6_0; compartment*(knuoff*A5_0*A1 - knuoff_0*A6_0);
  Rnu6_0: A6_0 + A1 -> A7_0; compartment*(knuoff*A6_0*A1 - knuoff_0*A7_0);
  Rnu7_0: A7_0 + A1 -> A8_0; compartment*(knuoff*A7_0*A1 - knuoff_0*A8_0);
  Rnu8_0: A8_0 + A1 -> A9_0; compartment*(knuoff*A8_0*A1 - knuoff_0*A9_0);
  Rnu9_0: A9_0 + A1 -> A10_0; compartment*(knuoff*A9_0*A1 - knuoff_0*A10_0);
  Rnu10_0: A10_0 + A1 -> A11_0; compartment*(knuoff*A10_0*A1 - knuoff_0*A11_0);
  Rnu11_0: A11_0 + A1 => A12; compartment*knuoff*A11_0*A1;
  Rfb4_0: A4_0 + A12 => F1; compartment*kfboff*A4_0*A12;
  Rfb5_0: A5_0 + A12 => F1; compartment*knuoff*A5_0*A12;
  Rfb6_0: A6_0 + A12 => F1; compartment*kfboff*A6_0*A12;
  Rfb7_0: A7_0 + A12 => F1; compartment*kfboff*A7_0*A12;
  Rfb8_0: A8_0 + A12 => F1; compartment*kfboff*A8_0*A12;
  Rfb9_0: A9_0 + A12 => F1; compartment*kfboff*A9_0*A12;
  Rfb10_0: A10_0 + A12 => F1; compartment*kfboff*A10_0*A12;
  Rfb11_0: A11_0 + A12 => F1; compartment*kfboff*A11_0*A12;
  Rswi: A4 + L => A4_0; compartment*kswi*A4*L;

  // Events:
  E1: at (time > 3), persistent=false, fromTrigger=false: A1 = 0.25;
  E2: at (time > 3), persistent=false, fromTrigger=false: L = 0.25;

  // Unit definitions:
  unit length = metre;
  unit area = metre^2;
  unit volume = 1e-3 litre;
  unit time = second;
  unit substance = 1e-3 mole;
end
