// SBML level 2 version 3

model New_Model()
  // New Model_1

  // Compartments:
  compartment compartment = 1;

  // Species:
  species A1 in compartment = 0.25;
  species A2 in compartment = 0;
  species A3 in compartment = 0;
  species A4 in compartment = 0;
  species A5 in compartment = 0;
  species A6 in compartment = 0;
  species A7 in compartment = 0;
  species A8 in compartment = 0;
  species A9 in compartment = 0;
  species A10 in compartment = 0;
  species A11 in compartment = 0;
  species F in compartment = 0;
  species $FF_0 in compartment;

  // Parameters:
  knu = 0.1;
  knu_0 = 0.001 unit_1;
  kfb = 100000;
  k = 10000000000;

  // Assignment rules:
  FF_0 := F*k;

  // Reactions:
  R1: 2 A1 -> A2; compartment*(knu*A1^2 - knu_0*A2);
  R2: A2 + A1 -> A3; compartment*(knu*A2*A1 - knu_0*A3);
  R3: A3 + A1 -> A4; compartment*(knu*A3*A1 - knu_0*A4);
  R4: A1 + A4 -> A5; compartment*(knu*A1*A4 - knu_0*A5);
  R5: A5 + A1 -> A6; compartment*(knu*A5*A1 - knu_0*A6);
  R6: A6 + A1 -> A7; compartment*(knu*A6*A1 - knu_0*A7);
  R7: A7 + A1 -> A8; compartment*(knu*A7*A1 - knu_0*A8);
  R8: A8 + A1 -> A9; compartment*(knu*A8*A1 - knu_0*A9);
  R9: A9 + A1 -> A10; compartment*(knu*A9*A1 - knu_0*A10);
  R10: A10 + A1 -> A11; compartment*(knu*A10*A1 - knu_0*A11);
  R11: A11 + A1 => F; compartment*kfb*A11*A1;
  R12: F + A1 => F; compartment*kfb*F*A1;
  R13: A2 + F => F; compartment*kfb*A2*F;
  R14: A3 + F => F; compartment*kfb*A3*F;
  R15: A4 + F => F; compartment*kfb*A4*F;
  R16: A5 + F => F; compartment*kfb*A5*F;
  R17: A6 + F => F; compartment*kfb*A6*F;
  R18: A7 + F => F; compartment*kfb*A7*F;
  R19: A8 + F => F; compartment*kfb*A8*F;
  R20: A9 + F => F; compartment*kfb*A9*F;
  R21: A10 + F => F; compartment*kfb*A10*F;
  R22: A11 + F => F; compartment*kfb*A11*F;

  // Unit definitions:
  unit time = 3600 second;
  unit unit_0 = 1 / (360000 second); unit_0 is "1/h";
  unit unit_1 = 1 / (1e-3 second); unit_1 is "1/ms";
end
